// COMSOL Multiphysics 5.4.0.225 model "beam.mph"
// Outline of the model tree

Geometry
  geom1 "Geometry 1" (3D, length unit m)
    blk1: Block | size = {0.2, 0.2, 2}
    fin: Finalize "Form Union"

Materials
  mat1: Common "Material 1" on domains 1
    def "Basic"
      youngsmodulus = 75e9
      poissonsratio = 0.33
      density = 2700

Physics
  solid: SolidMechanics on all domains
    dependent variable u = {u, v, w}
    lemm1: LinearElasticModel "Linear Elastic Material 1" (default)
    free1: Free (default)
    init1: init "Initial Values 1" (default)
    fix1: Fixed "Fixed Constraint 1" on boundaries 3
    bndl1: BoundaryLoad on boundaries 4 | LoadType = TotalForce; Ftot = {-50, 0, 0}

Mesh
  mesh1 "Mesh 1" (physics-controlled)
    size: MeshSizeDefault | hauto = 2

Studies
  std1 "Study 1"
    stat: Stationary

Solver configurations
  sol1 "Solution 1" (study std1)
    v1: Variables "Dependent Variables 1"
    s1: Stationary "Stationary Solver 1"
      fc1: FullyCoupled | linsolver = d1
      d1: Direct "Suggested Direct Solver (solid)"

Datasets
  dset1: Solution | solution = sol1
  cln1: CutLine3D | data = dset1
  cpl1: CutPlane | data = dset1

Plots
  pg1: PlotGroup3D "Stress (solid)" | data = dset1
    surf1: Surface | expr = solid.mises
      def: Deform "Deformation" | expr = {u, v, w}; descr = Displacement field
  pg2: PlotGroup3D "3D Plot Group 2" | data = dset1
    surf1: Surface | expr = solid.disp
      def1: Deform "Deformation 1" | expr = {u, v, w}; descr = Displacement field

Exports
  data1: Data
    data = dset1
    expr = u
    unit = m
    descr = Displacement field, X component
    filename = /home/arun/Desktop/beam1.txt